// SBML level 3 version 2

model unnamedModel()
  // model units - time: second, extent: mole

  // Compartments:
  compartment Adipose; Adipose has litre;
  compartment Arterial__Blood; Arterial__Blood has litre;
  compartment Bones; Bones has litre;
  compartment Brain; Brain has litre;
  compartment Gut; Gut has litre;
  compartment Heart; Heart has litre;
  compartment Kidneys; Kidneys has litre;
  compartment Liver; Liver has litre;
  compartment Lungs; Lungs has litre;
  compartment Muscles; Muscles has litre;
  compartment Pancreas; Pancreas has litre;
  compartment Rest__of__Body; Rest__of__Body has litre;
  compartment Skin; Skin has litre;
  compartment Spleen; Spleen has litre;
  compartment Stomach; Stomach has litre;
  compartment Venous__Blood; Venous__Blood has litre;

  // Species:
  substanceOnly species A__Adipose in Adipose = 0*OneNanoGram/Masse__Molaire*GramPerNanoGramP;  // substance in mole
  substanceOnly species A__Arterial__Blood in Arterial__Blood = 0*OneNanoGram/Masse__Molaire*GramPerNanoGramP;  // substance in mole
  substanceOnly species A__Bones in Bones = 0*OneNanoGram/Masse__Molaire*GramPerNanoGramP;  // substance in mole
  substanceOnly species A__Brain in Brain = 0*OneNanoGram/Masse__Molaire*GramPerNanoGramP;  // substance in mole
  substanceOnly species A__Gut in Gut = 0*OneNanoGram/Masse__Molaire*GramPerNanoGramP;  // substance in mole
  substanceOnly species A__Heart in Heart = 0*OneNanoGram/Masse__Molaire*GramPerNanoGramP;  // substance in mole
  substanceOnly species A__Kidneys in Kidneys = 0*OneNanoGram/Masse__Molaire*GramPerNanoGramP;  // substance in mole
  substanceOnly species A__Liver in Liver = 0*OneNanoGram/Masse__Molaire*GramPerNanoGramP;  // substance in mole
  substanceOnly species A__Lungs in Lungs = 0*OneNanoGram/Masse__Molaire*GramPerNanoGramP;  // substance in mole
  substanceOnly species A__Muscles in Muscles = 0*OneNanoGram/Masse__Molaire*GramPerNanoGramP;  // substance in mole
  substanceOnly species A__Pancreas in Pancreas = 0*OneNanoGram/Masse__Molaire*GramPerNanoGramP;  // substance in mole
  substanceOnly species A__Rest__of__Body in Rest__of__Body = 0*OneNanoGram/Masse__Molaire*GramPerNanoGramP;  // substance in mole
  substanceOnly species A__Skin in Skin = 0*OneNanoGram/Masse__Molaire*GramPerNanoGramP;  // substance in mole
  substanceOnly species A__Spleen in Spleen = 0*OneNanoGram/Masse__Molaire*GramPerNanoGramP;  // substance in mole
  substanceOnly species A__Stomach in Stomach = 0*OneNanoGram/Masse__Molaire*GramPerNanoGramP;  // substance in mole
  substanceOnly species A__Venous__Blood in Venous__Blood = Dose/Masse__Molaire*GramPerMilliGramP;  // substance in mole

  // Parameters:
  // rapport sang/plasma
  BP = 0.61 dimensionless;
  // Concentration observe
  C15 has NanoGramPerMilliLiter;
  // Clairance intrinsque hpatique
  CLint = 1998 LiterPerHour;
  // Dbit cardiaque
  CO has LiterPerHour;
  Dose = 50 MilliGram;
  // An auxiliary parameter to handle unit conversions
  GramPerMilliGramP = 0.001 GramPerMilliGram;
  // An auxiliary parameter to handle unit conversions
  GramPerNanoGramP = 1e-9 GramPerNanoGram;
  // An auxiliary parameter to handle unit conversions
  HourPerSecondP = 0.0002777778 HourPerSecond;
  // Coefficient de partage tissu / sang du tissu adipeux
  KbAD = 7.39 dimensionless;
  // Coefficient de partage tissu / sang des os
  KbBO = 1.03 dimensionless;
  // coefficient de partage tissu/sang
  KbBR = 3 dimensionless;
  // Coefficient de partage tissu / sang de l'Intestin
  KbGU = 3.32876 dimensionless;
  // Coefficient de partage tissu / sang du Coeur
  KbHT = 3.066387 dimensionless;
  // Coefficient de partage tissu / sang des Reins
  KbKI = 3.732581 dimensionless;
  // Coefficient de partage tissu / sang du Foie
  KbLI = 5.814763 dimensionless;
  // coefficient de partage tissu / sang des Poumons
  KbLU = 2.301129 dimensionless;
  // Coefficient de partage tissu / sang des muscles
  KbMU = 1.35 dimensionless;
  // Coefficient de partage tissu / sang du Pancras
  KbPA = 1.380437 dimensionless;
  // Coefficient de partage tissu / sang du reste du corps
  KbRB = 1.35 dimensionless;
  // Coefficient de partage tissu / sang de la Peau
  KbSK = 0.5922657 dimensionless;
  // Coefficient de partage tissu / sang de la Rate
  KbSP = 1.380437 dimensionless;
  // Coefficient de partage tissu / sang de l'Estomac
  KbST = 1.380437 dimensionless;
  Masse__Molaire = 313.397 GramPerMole;
  // An auxiliary parameter to handle unit conversions
  OneLiter = 1 litre;
  // An auxiliary parameter to handle unit conversions
  OneLiterPerHour = 1 LiterPerHour;
  // An auxiliary parameter to handle unit conversions
  OneLiterPerKiloGram = 1 LiterPerKiloGram;
  // An auxiliary parameter to handle unit conversions
  OneMilliGram = 1 MilliGram;
  // An auxiliary parameter to handle unit conversions
  OneMilliLiterPerNanoGram = 1 MilliLiterPerNanoGram;
  // An auxiliary parameter to handle unit conversions
  OneNanoGram = 1 NanoGram;
  // An auxiliary parameter to handle unit conversions
  OneNanoGramLiterPerMilliLiterPerMole = 1 NanoGramLiterPerMilliLiterPerMole;
  // An auxiliary parameter to handle unit conversions
  OnePerKiloGram = 1 PerKiloGram;
  // Dbit des Adipeux
  QAD has LiterPerHour;
  // Dbit des Os
  QBO has LiterPerHour;
  // Dbit du Cerveau
  QBR has LiterPerHour;
  // Dbit de l'Intestin
  QGU has LiterPerHour;
  // Dbit de l'artre hpatique
  QHA has LiterPerHour;
  // Dbit du Coeur
  QHT has LiterPerHour;
  // Dbit des Reins
  QKI has LiterPerHour;
  // Dbit du Foie
  QLI has LiterPerHour;
  // Dbit pulmonaire
  QLU has LiterPerHour;
  // Dbit des Muscles
  QMU has LiterPerHour;
  // Dbit du Pancras
  QPA has LiterPerHour;
  // Dbit du reste du corps
  QRB has LiterPerHour;
  // Dbit de la Peau
  QSK has LiterPerHour;
  // Dbit de la Rate
  QSP has LiterPerHour;
  // Dbit de l'estomac
  QST has LiterPerHour;
  // Volume du sang veineux
  S15 has litre;
  // Volume du Sang artriel
  VAB has litre;
  // Volume de l'Adipeux
  VAD has litre;
  // Volume de l'Os
  VBO has litre;
  // Volume du Cerveau
  VBR has litre;
  // Volume de l'Intestin
  VGU has litre;
  // Volume du coeur
  VHT has litre;
  // Volume des Reins
  VKI has litre;
  // Volume du Foie
  VLI has litre;
  // Volume des Poumons
  VLU has litre;
  // Volume des Muscles
  VMU has litre;
  // Volume du Pancras
  VPA has litre;
  // Volume du Reste du corps
  VRB has litre;
  // Volume de la Peau
  VSK has litre;
  // Volume de la Rate
  VSP has litre;
  // Volume de l'Estomac
  VST has litre;
  // Volume du sang Veineux
  VVB has litre;
  // Poids corporel
  WT = 82 kilogram;
  // fraction libre sang
  fub has dimensionless;
  // fraction libre plasma
  fup = 0.028 dimensionless;
  logC15 has dimensionless;

  // Assignment rules:
  Adipose := VAD;
  Arterial__Blood := VAB;
  Bones := VBO;
  Brain := VBR;
  C15 := A__Venous__Blood/S15*313.397*1000000*OneNanoGramLiterPerMilliLiterPerMole;
  CO := 187*(WT*OnePerKiloGram)^0.81*60/1000*OneLiterPerHour;
  Gut := VGU;
  Heart := VHT;
  Kidneys := VKI;
  Liver := VLI;
  Lungs := VLU;
  Muscles := VMU;
  Pancreas := VPA;
  QAD := 5/100*CO;
  QBO := 5/100*CO;
  QBR := 12/100*CO;
  QGU := 14/100*CO;
  QHA := QLI - (QSP + QPA + QST + QGU);
  QHT := 4/100*CO;
  QKI := 19/100*CO;
  QLI := 25.5/100*CO;
  QLU := QHT + QBR + QMU + QAD + QSK + QLI + QBO + QKI + QRB;
  QMU := 17/100*CO;
  QPA := 1/100*CO;
  QRB := CO - (QHT + QBR + QMU + QAD + QSK + QLI + QBO + QKI);
  QSK := 5/100*CO;
  QSP := 3/100*CO;
  QST := 1/100*CO;
  Rest__of__Body := VRB;
  S15 := VVB*BP;
  Skin := VSK;
  Spleen := VSP;
  Stomach := VST;
  VAB := 2.81/100*WT/1.04*OneLiterPerKiloGram;
  VAD := 21.42/100*WT/0.916*OneLiterPerKiloGram;
  VBO := 14.29/100*WT/1.99*OneLiterPerKiloGram;
  VBR := 2/100*WT/1.036*OneLiterPerKiloGram;
  VGU := 1.44/100*WT/1.043*OneLiterPerKiloGram;
  VHT := 0.47/100*WT/1.03*OneLiterPerKiloGram;
  VKI := 0.44/100*WT/1.05*OneLiterPerKiloGram;
  VLI := 2.57/100*WT/1.04*OneLiterPerKiloGram;
  VLU := 0.76/100*WT/1.051*OneLiterPerKiloGram;
  VMU := 40/100*WT/1.041*OneLiterPerKiloGram;
  VPA := 0.14/100*WT/1.045*OneLiterPerKiloGram;
  VRB := 3.86/100*WT/1.04*OneLiterPerKiloGram;
  VSK := 3.71/100*WT/1.116*OneLiterPerKiloGram;
  VSP := 0.26/100*WT/1.054*OneLiterPerKiloGram;
  VST := 0.21/100*WT/1.05*OneLiterPerKiloGram;
  VVB := 5.62/100*WT/1.04*OneLiterPerKiloGram;
  Venous__Blood := VVB;
  fub := fup/BP;
  logC15 := ln(max(C15*OneMilliLiterPerNanoGram, 1e-12));

  // Rate rules:
  A__Adipose' = QAD*(A__Arterial__Blood/VAB - A__Adipose/(KbAD*VAD))*HourPerSecondP;
  A__Arterial__Blood' = QLU*(A__Lungs/(KbLU*VLU) - A__Arterial__Blood/VAB)*HourPerSecondP;
  A__Bones' = QBO*(A__Arterial__Blood/VAB - A__Bones/(KbBO*VBO))*HourPerSecondP;
  A__Brain' = QBR*(A__Arterial__Blood/VAB - A__Brain/(KbBR*VBR))*HourPerSecondP;
  A__Gut' = QGU*(A__Arterial__Blood/VAB - A__Gut/(KbGU*VGU))*HourPerSecondP;
  A__Heart' = QHT*(A__Arterial__Blood/VAB - A__Heart/(KbHT*VHT))*HourPerSecondP;
  A__Kidneys' = QKI*(A__Arterial__Blood/VAB - A__Kidneys/(KbKI*VKI))*HourPerSecondP;
  A__Liver' = (QHA*A__Arterial__Blood/VAB + QSP*A__Spleen/(KbSP*VSP) + QPA*A__Pancreas/(KbPA*VPA) + QST*A__Stomach/(KbST*VST) + QGU*A__Gut/(KbGU*VGU) - CLint*fub*A__Liver/(KbLI*VLI) - QLI*A__Liver/(KbLI*VLI))*HourPerSecondP;
  A__Lungs' = QLU*(A__Venous__Blood/VVB - A__Lungs/(KbLU*VLU))*HourPerSecondP;
  A__Muscles' = QMU*(A__Arterial__Blood/VAB - A__Muscles/(KbMU*VMU))*HourPerSecondP;
  A__Pancreas' = QPA*(A__Arterial__Blood/VAB - A__Pancreas/(KbPA*VPA))*HourPerSecondP;
  A__Rest__of__Body' = QRB*(A__Arterial__Blood/VAB - A__Rest__of__Body/(KbRB*VRB))*HourPerSecondP;
  A__Skin' = QSK*(A__Arterial__Blood/VAB - A__Skin/(KbSK*VSK))*HourPerSecondP;
  A__Spleen' = QSP*(A__Arterial__Blood/VAB - A__Spleen/(KbSP*VSP))*HourPerSecondP;
  A__Stomach' = QST*(A__Arterial__Blood/VAB - A__Stomach/(KbST*VST))*HourPerSecondP;
  A__Venous__Blood' = (QHT*A__Heart/(KbHT*VHT) + QBR*A__Brain/(KbBR*VBR) + QMU*A__Muscles/(KbMU*VMU) + QAD*A__Adipose/(KbAD*VAD) + QSK*A__Skin/(KbSK*VSK) + QLI*A__Liver/(KbLI*VLI) + QBO*A__Bones/(KbBO*VBO) + QKI*A__Kidneys/(KbKI*VKI) + QRB*A__Rest__of__Body/(KbRB*VRB) - QLU*A__Venous__Blood/VVB)*HourPerSecondP;

  // Unit definitions:
  unit GramPerMilliGram = gram / (1e-3 gram);
  unit GramPerMole = gram / mole;
  unit GramPerNanoGram = gram / (1e-9 gram);
  unit HourPerSecond = 3600 second / second;
  unit LiterPerHour = litre / (3600 second);
  unit LiterPerKiloGram = litre / (1000 gram);
  unit MilliGram = 1e-3 gram;
  unit MilliLiterPerNanoGram = 1e-3 litre / (1e-9 gram);
  unit NanoGram = 1e-9 gram;
  unit NanoGramLiterPerMilliLiterPerMole = 1e-9 gram * litre / (1e-3 litre * mole);
  unit NanoGramPerMilliLiter = 1e-9 gram / (1e-3 litre);
  unit PerKiloGram = 1 / (1000 gram);
end
