// SBML level 3 version 2

model unnamedModel()
  // model units - time: second, extent: mole

  // Parameters:
  // An auxiliary parameter to handle unit conversions
  Day0_DOT_20PerSecond_000000450_DOT_20P = 0.1029668 Day0_DOT_20PerSecond_000000450_DOT_20;
  // An auxiliary parameter to handle unit conversions
  DayPerSecondP = 1.157407e-5 DayPerSecond;
  // An auxiliary parameter to handle unit conversions
  MicroSubstance__countPerSubstance__countP = 1000000 MicroSubstance__countPerSubstance__count;
  Nmax = 100 Substance__countPerMilliLiter;
  // An auxiliary parameter to handle unit conversions
  OneDay = 1 Day;
  // An auxiliary parameter to handle unit conversions
  OneMilliLiterPerSubstance__count = 1 MilliLiterPerSubstance__count;
  // An auxiliary parameter to handle unit conversions
  OneNanoGramPerMilliLiter = 1 NanoGramPerMilliLiter;
  // An auxiliary parameter to handle unit conversions
  OneSubstance__count = 1 Substance__count;
  PSA = PSA__baseline; PSA has NanoGramPerMilliLiter;
  PSA__baseline = 10 NanoGramPerMilliLiter;
  R = baseline__total__cells/(1 + baseline__ratio__S__R)*MicroSubstance__countPerSubstance__countP; R has MicroSubstance__countPerMilliLiter;
  R__E = 0.5 dimensionless;
  S = baseline__total__cells*baseline__ratio__S__R/(1 + baseline__ratio__S__R); S has Substance__countPerMilliLiter;
  // An auxiliary parameter to handle unit conversions
  SecondPerDayP = 86400 SecondPerDay;
  // An auxiliary parameter to handle unit conversions
  Substance__countPerMicroSubstance__countP = 1e-6 Substance__countPerMicroSubstance__count;
  alpha = 0.5 PerDay;
  baseline__hazard has PerDay;
  baseline__log__ratio__S__R = 5 dimensionless;
  baseline__ratio__S__R has dimensionless;
  baseline__total__cells has Substance__countPerMilliLiter;
  beta1__survival = 0 dimensionless;
  beta2__survival = 0 dimensionless;
  cumulative__hazard = 0 dimensionless;
  d has PerDay;
  delta = 0.23 PerDay;
  epsilon = 0.5 dimensionless;
  g = 1e-7 PerDay;
  instantaneous__hazard has PerDay;
  k__weibull = 1.2 dimensionless;
  lambda__weibull = 800 Day;
  log__hazard has dimensionless;
  log__psa has dimensionless;
  p = 20 NanoGramPerDay;
  treatment__effect has dimensionless;
  treatment__end = 50 Day;
  treatment__start = 10 Day;

  // Assignment rules:
  baseline__hazard := k__weibull/lambda__weibull*(time/lambda__weibull)^(k__weibull - 1)*Day0_DOT_20PerSecond_000000450_DOT_20P;
  baseline__ratio__S__R := exp(baseline__log__ratio__S__R);
  baseline__total__cells := delta/p*PSA__baseline*OneSubstance__count;
  d := R__E*alpha;
  instantaneous__hazard := baseline__hazard*exp(beta1__survival*ln(S*OneMilliLiterPerSubstance__count) + beta2__survival*ln(R*OneMilliLiterPerSubstance__count*Substance__countPerMicroSubstance__countP));
  log__hazard := ln(instantaneous__hazard*OneDay);
  log__psa := ln(PSA/OneNanoGramPerMilliLiter + 1);
  treatment__effect := piecewise(piecewise(epsilon, time < treatment__end*SecondPerDayP, 0), time >= treatment__start*SecondPerDayP, 0);

  // Rate rules:
  PSA' = (p*(S + R*Substance__countPerMicroSubstance__countP)/OneSubstance__count - delta*PSA)*DayPerSecondP;
  R' = (alpha*(1 - (S + R*Substance__countPerMicroSubstance__countP)/Nmax)*R + g*(S - R*Substance__countPerMicroSubstance__countP)*MicroSubstance__countPerSubstance__countP - d*R)*DayPerSecondP;
  S' = (alpha*treatment__effect*(1 - (S + R*Substance__countPerMicroSubstance__countP)/Nmax)*S + g*(R - S*MicroSubstance__countPerSubstance__countP)*Substance__countPerMicroSubstance__countP - d*S)*DayPerSecondP;
  cumulative__hazard' = instantaneous__hazard*DayPerSecondP;

  // Unit definitions:
  unit Day = 86400 second;
  unit Day0_DOT_20PerSecond_000000450_DOT_20 = (86400 second)^0.2 / second^0.2;
  unit DayPerSecond = 86400 second / second;
  unit MicroSubstance__countPerMilliLiter = 1e-6 item / (1e-3 litre);
  unit MicroSubstance__countPerSubstance__count = 1e-6 item / item;
  unit MilliLiterPerSubstance__count = 1e-3 litre / item;
  unit NanoGramPerDay = 1e-9 gram / (86400 second);
  unit NanoGramPerMilliLiter = 1e-9 gram / (1e-3 litre);
  unit PerDay = 1 / (86400 second);
  unit SecondPerDay = second / (86400 second);
  unit Substance__count = item;
  unit Substance__countPerMicroSubstance__count = item / (1e-6 item);
  unit Substance__countPerMilliLiter = item / (1e-3 litre);
end
