// SBML level 3 version 2

model unnamedModel()
  // model units - time: second, extent: mole

  // Parameters:
  Ac = 0 MilliGram;
  Ad = 0 MilliGram;
  Beta = 0.5 dimensionless;
  C has MilliGramPerLiter;
  Dose = 100 MilliGram;
  // An auxiliary parameter to handle unit conversions
  HourPerSecondP = 0.0002777778 HourPerSecond;
  Km = 0.2 MilliGramPerLiter;
  // An auxiliary parameter to handle unit conversions
  OneHour = 1 Hour;
  // An auxiliary parameter to handle unit conversions
  OneSecond = 1 second;
  // An auxiliary parameter to handle unit conversions
  SecondPerHourP = 3600 SecondPerHour;
  // An auxiliary parameter to handle unit conversions
  SecondSquareRootPerHourSquareRootP = 60 SecondSquareRootPerHourSquareRoot;
  V = 70 litre;
  Vm = 6 MilliGramPerHour;
  alpha = 1 LiterPerMilliGram;
  cumulative_hazard = 0 dimensionless;
  gamma = 15 Hour;
  hazard has PerHour;
  ka = 0.5 PerHour;
  log_hazard has dimensionless;

  // Assignment rules:
  C := Ac/V;
  hazard := Beta/gamma*((time + 1*OneSecond)/gamma)^(Beta - 1)*exp(alpha*C)*SecondSquareRootPerHourSquareRootP;
  log_hazard := ln(hazard*OneHour);

  // Rate rules:
  Ac' = (ka*Ad - Vm*Ac/(Km*V + Ac))*HourPerSecondP;
  Ad' = -ka*Ad*HourPerSecondP;
  cumulative_hazard' = hazard*HourPerSecondP;

  // Events:
  Event1: at (time >= 0), t0=false, fromTrigger=false: Ad = Ad + Dose;
  Event2: at (time >= 24*OneHour*SecondPerHourP), t0=false, fromTrigger=false: Ad = Ad + Dose;
  Event3: at (time >= 48*OneHour*SecondPerHourP), t0=false, fromTrigger=false: Ad = Ad + Dose;
  Event4: at (time >= 72*OneHour*SecondPerHourP), t0=false, fromTrigger=false: Ad = Ad + Dose;
  Event5: at (time >= 96*OneHour*SecondPerHourP), t0=false, fromTrigger=false: Ad = Ad + Dose;
  Event6: at (time >= 120*OneHour*SecondPerHourP), t0=false, fromTrigger=false: Ad = Ad + Dose;
  Event7: at (time >= 144*OneHour*SecondPerHourP), t0=false, fromTrigger=false: Ad = Ad + Dose;

  // Unit definitions:
  unit Hour = 3600 second;
  unit HourPerSecond = 3600 second / second;
  unit LiterPerMilliGram = litre / (1e-3 gram);
  unit MilliGram = 1e-3 gram;
  unit MilliGramPerHour = 1e-3 gram / (3600 second);
  unit MilliGramPerLiter = 1e-3 gram / litre;
  unit PerHour = 1 / (3600 second);
  unit SecondPerHour = second / (3600 second);
  unit SecondSquareRootPerHourSquareRoot = second^0.5 / (3600 second)^0.5;
end
